*Heading
** Job name: Co-execution-1-CFD Model name: CFD
** Generated by: Abaqus/CAE 6.14-4
*Preprint, echo=NO, model=NO, history=NO, contact=NO
**
** PARTS
**
*Part, name=Part-1
*Node
      1, -0.281732559,  0.959492981,           0.
      2, -0.755749583,  0.654860735,           0.
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*Element, type=FC3D8
   1,   94,   87,   86,   96,   23,   16,   15,   25
   2,  108,   95,   88,   72,   37,   24,   17,    1
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*Nset, nset=_PickedSet3, internal, generate
    1,  2627,     1
*Elset, elset=_PickedSet3, internal, generate
    1,  2124,     1
** Section: Section-1
*Fluid Section, type=SINGLE FLUID, elset=_PickedSet3
water,
*End Part
**
**
** ASSEMBLY
**
*Assembly, name=Assembly
**
*Instance, name=Part-1-1, part=Part-1
*End Instance
**
*Nset, nset=_PickedSet7, internal, instance=Part-1-1
    1,    2,    3,    4,    5,    6
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*Elset, elset=_PickedSet7, internal, instance=Part-1-1
    1,    2,    3,    4,    5,    6
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*Elset, elset=__PickedSurf4_S4, internal, instance=Part-1-1
    1,    3,   18,   20,   21,   22
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*Elset, elset=__PickedSurf4_S5, internal, instance=Part-1-1
    2,   33,   35,   61,   92,   94
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*Elset, elset=__PickedSurf4_S6, internal, instance=Part-1-1
   11,   13,   17,   70,   72,   76
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*Elset, elset=__PickedSurf4_S3, internal, instance=Part-1-1, generate
   12,  2077,    59
*Surface, type=ELEMENT, name=_PickedSurf4, internal
__PickedSurf4_S4, S4
__PickedSurf4_S5, S5
__PickedSurf4_S6, S6
__PickedSurf4_S3, S3
*Elset, elset=__PickedSurf5_S1, internal, instance=Part-1-1, generate
 2066,  2124,     1
*Surface, type=ELEMENT, name=_PickedSurf5, internal
__PickedSurf5_S1, S1
*Elset, elset=__PickedSurf6_S2, internal, instance=Part-1-1, generate
  1,  59,   1
*Surface, type=ELEMENT, name=_PickedSurf6, internal
__PickedSurf6_S2, S2
*End Assembly
**
** MATERIALS
**
*Material, name=water
*Density
 1e-09,
*Viscosity
 1e-05,
** ----------------------------------------------------------------
**
** STEP: Step-1
**
*Step, name=Step-1, nlgeom=NO
*CFD, incompressible navier stokes
0.01, 0.2, 0.025, 0.45, 1
1e-10, 0.5,  , 0.5, 0.5
*Momentum Equation Solver
500, 2, 1e-05
*Pressure Equation Solver
250, 2, 1e-05
ICC, 1, 1, CG
*Transport Equation Solver
500, 2, 1e-05
**
** BOUNDARY CONDITIONS
**
** Name: BC-1 Type: Fluid inlet/outlet
*Fluid Boundary, type=Surface
_PickedSurf5, P, 0.
** Name: BC-2 Type: Fluid inlet/outlet
*Fluid Boundary, type=Surface
_PickedSurf6, VELZ, 1.
** Name: BC-3 Type: Displacement/Rotation
*Boundary
_PickedSet7, 1, 1
_PickedSet7, 2, 2
_PickedSet7, 3, 3
** Interaction: Int-1
*Co-simulation, name=Int-1, program=MULTIPHYSICS
*Co-simulation Region, import, type=SURFACE
_PickedSurf4, U
_PickedSurf4, V
*Co-simulation Region, export, type=SURFACE
_PickedSurf4, LUMPEDMASS
_PickedSurf4, TRSHR
**
** OUTPUT REQUESTS
**
*Restart, write, frequency=0
**
** FIELD OUTPUT: F-Output-1
**
*Output, field, variable=PRESELECT
*Output, history, frequency=0
*End Step
