*Heading
** Job name: Co-execution-1-Std Model name: Std
** Generated by: Abaqus/CAE 6.14-4
*Preprint, echo=NO, model=NO, history=NO, contact=NO
**
** PARTS
**
*Part, name=Part-1
*Node
      1, -0.342020154,  0.939692616,           0.
      2, -0.642787635,  0.766044438,           0.
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*Element, type=C3D8R
  1,   65,   81,   64,   49,   17,   33,   16,    1
  2,   49,   50,   84,   65,    1,    2,   36,   17
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*Nset, nset=_PickedSet3, internal, generate
    1,  1440,     1
*Elset, elset=_PickedSet3, internal, generate
   1,  812,    1
** Section: Section-1
*Solid Section, elset=_PickedSet3, material=Steel
,
*End Part
**
**
** ASSEMBLY
**
*Assembly, name=Assembly
**
*Instance, name=Part-1-1, part=Part-1
*End Instance
**
*Nset, nset=_PickedSet5, internal, instance=Part-1-1
    1,    2,    3,    4,    5,    6
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*Elset, elset=_PickedSet5, internal, instance=Part-1-1
   1,   2,   3,   4,   5,   6
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*Elset, elset=__PickedSurf4_S5, internal, instance=Part-1-1
   1,   3,  29,  31,  57,  59
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*Elset, elset=__PickedSurf4_S3, internal, instance=Part-1-1
   2,   9,  10,  11,  12,  19
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*Elset, elset=__PickedSurf4_S4, internal, instance=Part-1-1
   5,   6,   7,   8,  13,  14
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*Elset, elset=__PickedSurf4_S6, internal, instance=Part-1-1
  25,  27,  53,  55,  81,  83
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*Surface, type=ELEMENT, name=_PickedSurf4, internal
__PickedSurf4_S5, S5
__PickedSurf4_S3, S3
__PickedSurf4_S4, S4
__PickedSurf4_S6, S6
*End Assembly
**
** MATERIALS
**
*Material, name=Steel
*Density
 7.9e-09,
*Elastic
200000., 0.3
** ----------------------------------------------------------------
**
** STEP: Step-1
**
*Step, name=Step-1, nlgeom=YES, inc=10000
*Dynamic
0.01,0.2,1e-09
**
** BOUNDARY CONDITIONS
**
** Name: BC-1 Type: Displacement/Rotation
*Boundary
_PickedSet5, 1, 1
_PickedSet5, 2, 2
_PickedSet5, 3, 3
** Interaction: Int-1
*Co-simulation, name=Int-1, program=MULTIPHYSICS
*Co-simulation Region, import, type=SURFACE
_PickedSurf4, CF
_PickedSurf4, LUMPEDMASS
*Co-simulation Region, export, type=SURFACE
_PickedSurf4, U
_PickedSurf4, V
**
** OUTPUT REQUESTS
**
*Restart, write, frequency=0
**
** FIELD OUTPUT: F-Output-1
**
*Output, field, variable=PRESELECT
**
** HISTORY OUTPUT: H-Output-1
**
*Output, history, variable=PRESELECT
*End Step
